New "Line.CMT_CH009" phases=3 bus1="RJO002_MT_0.1.2.3" bus2="RJO002_MT_1.1.2.3" r1=0.001 r0=0.001 x1=0.0 x0=0.0 c1=0.0 c0=0.0  switch = T length=0.00100
New "Line.CMT_CH002" phases=3 bus1="RJO002_MT_2.1.2.3" bus2="RJO002_MT_3.1.2.3" r1=0.001 r0=0.001 x1=0.0 x0=0.0 c1=0.0 c0=0.0  switch = T length=0.00100
!New "Line.CMT_CH005" phases=3 bus1="RJO002_MT_6.1.2.3" bus2="RJO002_MT_7.1.2.3" r1=0.001 r0=0.001 x1=0.0 x0=0.0 c1=0.0 c0=0.0  switch = T length=0.00100
!New "Line.CMT_CH007" phases=3 bus1="RJO002_MT_8.1.2.3" bus2="RJO002_MT_9.1.2.3" r1=0.001 r0=0.001 x1=0.0 x0=0.0 c1=0.0 c0=0.0  switch = T length=0.00100
